units           real
atom_style      full
boundary        p p p

variable	temperature equal TEMPERATURE # K
variable	tempDamp equal 100 # fs
variable        pressure equal PRESSURE # atm
variable        pressureDamp equal 1000 # This is 1 ps
variable        seed equal 745823

# OPLS potential
bond_style      harmonic
angle_style      harmonic
dihedral_style      opls
pair_style lj/cut/coul/long 10.0 10.0
special_bonds lj/coul 0.0 0.0 0.5
pair_modify shift yes mix geometric

read_data	h2o2-400K-100atm.lammps-data

replicate 	2 2 2

kspace_style    pppm 1e-5

neighbor        1.0 bin
neigh_modify    delay 0 every 5 check yes

timer           timeout 23:55:00 every 1000

compute 1 all dihedral/local phi
compute 2 all reduce ave c_1

thermo          1000
thermo_style    custom step c_2 temp press vol ke pe etotal lx ly lz ebond eangle edihed eimp epair evdwl ecoul elong etail


timestep	0.5

# Equilibration

fix             1 all nph iso ${pressure} ${pressure} ${pressureDamp}
fix             2 all temp/csvr ${temperature} ${temperature} ${tempDamp} ${seed}
fix             3 all momentum 100 linear 1 1 1 rescale angular

velocity        all create ${temperature} ${seed} dist gaussian

run             20000000 upto # 10 ns

# Production

reset_timestep  0

group oxy type 1
group hydro type 2
compute 3 all msd
compute 4 oxy msd
compute 5 hydro msd

dump            myDump all custom 10000 h2o2.lammps-dump-text id type xs ys zs
fix		4 all print 1000 "$(step) $(vol) $(pe) $(c_2) $(enthalpy) $(c_3[4]) $(c_4[4]) $(c_5[4])" file thermo.txt screen no title "# step vol pe c_2 entalpy c_3 c_4 c_5"
run             200000000 upto # 100 ns

write_data      final.lammps-data
